<?xml version="1.0"?>
<?xml-stylesheet type="text/xsl" href="http://jsbsim.sourceforge.net/JSBSim.xsl"?>
<fdm_config xmlns:xsi="http://www.w3.org/2001/XMLSchema-instance" xsi:noNamespaceSchemaLocation="http://jsbsim.sourceforge.net/JSBSim.xsd"
		name="kentavros" version="2.0" release="ALPHA">

<fileheader>
	<author>Aleksandr Malikov</author>
	<filecreationdate>2018-07-14</filecreationdate>
	<version>$Revision: 1.0 $</version>
	<description>Kentavros</description>
</fileheader>

<metrics>
	<wingarea  unit="M2">   0.1 </wingarea>
	<wingspan  unit="M" >   1.0 </wingspan>
	<wing_incidence>        0.1 </wing_incidence>
	<chord     unit="M" >   1.0 </chord>
	<htailarea unit="FT2">  0.1 </htailarea>
	<htailarm  unit="FT" >  1.0 </htailarm>
	<vtailarea unit="FT2">  0.1 </vtailarea>
	<vtailarm  unit="FT" >  1.0 </vtailarm>
	<location name="AERORP" unit="M">
		<x> 0.92</x>
		<y> 0</y>
		<z> 0</z>
	</location>
	<location name="EYEPOINT" unit="M">
		<x> 0.9</x>
		<y> 0.0</y>
		<z> 0.0</z>
	</location>
	<location name="VRP" unit="M">
		<x> 0</x>
		<y> 0</y>
		<z> 0</z>
	</location>
</metrics>

<mass_balance>
	<ixx unit="KG*M2">15.00</ixx>
	<iyy unit="KG*M2">45.00</iyy>
	<izz unit="KG*M2">45.00</izz>
	<emptywt unit="KG">34.90</emptywt>
	<location name="CG" unit="M">
		<x> 0.92</x>
		<y> 0</y>
		<z> 0</z>
	</location>
</mass_balance>


<!-- ************************** GROUND REACTIONS *************************** -->
<ground_reactions>
	<contact type="STRUCTURE" name="gear.nose">
		<location unit="M">
			<x> 0.049</x>
			<y> 0.000</y>
			<z>-0.224</z>
		</location>
		<static_friction>0.80</static_friction>
		<dynamic_friction>0.50</dynamic_friction>
		<spring_coeff unit="LBS/FT">5000</spring_coeff>
		<damping_coeff unit="LBS/FT/SEC">100</damping_coeff>
	</contact>

	<contact type="STRUCTURE" name="gear.main.l">
		<location unit="M">
			<x> 1.291</x>
			<y>-0.381</y>
			<z>-0.238</z>
		</location>
		<static_friction>0.80</static_friction>
		<dynamic_friction>0.50</dynamic_friction>
		<spring_coeff unit="LBS/FT">5000</spring_coeff>
		<damping_coeff unit="LBS/FT/SEC">100</damping_coeff>
	</contact>

	<contact type="STRUCTURE" name="gear.main.r">
		<location unit="M">
			<x> 1.291</x>
			<y> 0.381</y>
			<z>-0.238</z>
		</location>
		<static_friction>0.80</static_friction>
		<dynamic_friction>0.50</dynamic_friction>
		<spring_coeff unit="LBS/FT">5000</spring_coeff>
		<damping_coeff unit="LBS/FT/SEC">100</damping_coeff>
	</contact>

	<contact type="STRUCTURE" name="nacelle.fl">
		<location unit="M">
			<x> 0.317</x>
			<y>-0.799</y>
			<z>-0.129</z>
		</location>
		<static_friction>0.80</static_friction>
		<dynamic_friction>0.50</dynamic_friction>
		<spring_coeff unit="LBS/FT">5000</spring_coeff>
		<damping_coeff unit="LBS/FT/SEC">100</damping_coeff>
	</contact>

	<contact type="STRUCTURE" name="nacelle.fr">
		<location unit="M">
			<x> 0.317</x>
			<y> 0.799</y>
			<z>-0.129</z>
		</location>
		<static_friction>0.80</static_friction>
		<dynamic_friction>0.50</dynamic_friction>
		<spring_coeff unit="LBS/FT">5000</spring_coeff>
		<damping_coeff unit="LBS/FT/SEC">100</damping_coeff>
	</contact>

	<contact type="STRUCTURE" name="nacelle.rl">
		<location unit="M">
			<x> 2.083</x>
			<y>-0.568</y>
			<z>-0.090</z>
		</location>
		<static_friction>0.80</static_friction>
		<dynamic_friction>0.50</dynamic_friction>
		<spring_coeff unit="LBS/FT">5000</spring_coeff>
		<damping_coeff unit="LBS/FT/SEC">100</damping_coeff>
	</contact>

	<contact type="STRUCTURE" name="nacelle.rr">
		<location unit="M">
			<x> 2.083</x>
			<y> 0.568</y>
			<z>-0.090</z>
		</location>
		<static_friction>0.80</static_friction>
		<dynamic_friction>0.50</dynamic_friction>
		<spring_coeff unit="LBS/FT">5000</spring_coeff>
		<damping_coeff unit="LBS/FT/SEC">100</damping_coeff>
	</contact>

	<contact type="STRUCTURE" name="body.wing.l">
		<location unit="M">
			<x> 1.545</x>
			<y>-1.365</y>
			<z> 0.031</z>
		</location>
		<static_friction>0.80</static_friction>
		<dynamic_friction>0.50</dynamic_friction>
		<spring_coeff unit="LBS/FT">5000</spring_coeff>
		<damping_coeff unit="LBS/FT/SEC">100</damping_coeff>
	</contact>

	<contact type="STRUCTURE" name="body.wing.r">
		<location unit="M">
			<x> 1.545</x>
			<y> 1.365</y>
			<z> 0.031</z>
		</location>
		<static_friction>0.80</static_friction>
		<dynamic_friction>0.50</dynamic_friction>
		<spring_coeff unit="LBS/FT">5000</spring_coeff>
		<damping_coeff unit="LBS/FT/SEC">100</damping_coeff>
	</contact>

	<contact type="STRUCTURE" name="body.tail">
		<location unit="M">
			<x> 2.115</x>
			<y> 0.000</y>
			<z> 0.601</z>
		</location>
		<static_friction>0.80</static_friction>
		<dynamic_friction>0.50</dynamic_friction>
		<spring_coeff unit="LBS/FT">5000</spring_coeff>
		<damping_coeff unit="LBS/FT/SEC">100</damping_coeff>
	</contact>

	<contact type="STRUCTURE" name="body.tail">
		<location unit="M">
			<x> 0.547</x>
			<y> 0.000</y>
			<z> 0.170</z>
		</location>
		<static_friction>0.80</static_friction>
		<dynamic_friction>0.50</dynamic_friction>
		<spring_coeff unit="LBS/FT">5000</spring_coeff>
		<damping_coeff unit="LBS/FT/SEC">100</damping_coeff>
	</contact>

	<contact type="STRUCTURE" name="body.nose">
		<location unit="M">
			<x> 0.000</x>
			<y> 0.000</y>
			<z> 0.000</z>
		</location>
		<static_friction>0.80</static_friction>
		<dynamic_friction>0.50</dynamic_friction>
		<spring_coeff unit="LBS/FT">5000</spring_coeff>
		<damping_coeff unit="LBS/FT/SEC">100</damping_coeff>
	</contact>

</ground_reactions>


<!-- ****************************** PROPULSION ***************************** -->
<propulsion>
	<engine file="eng"> 		<!-- ESC 1: front right, CCW -->
		<location unit="M">
			<x> 0.312</x>
			<y> 0.749</y>
			<z> 0.183</z>
		</location>
		<orient unit="DEG">
			<pitch> 90</pitch>
			<roll>  0</roll>
			<yaw>   0</yaw>
		</orient>
		<thruster file="frontprop">
			<sense>1</sense>
			<location unit="M">
				<x> 0.312</x>
				<y> 0.749</y>
				<z> 0.183</z>
			</location>
			<orient unit="DEG">
				<pitch> 90</pitch>
				<roll>   0</roll>
				<yaw>    0</yaw>
			</orient>
		</thruster>
	</engine>

	<engine file="eng"> 		<!-- ESC 2: rear left, CCW -->
		<location unit="M">
			<x> 2.077</x>
			<y>-0.518</y>
			<z> 0.222</z>
		</location>
		<orient unit="DEG">
			<pitch> 90</pitch>
			<roll>  0</roll>
			<yaw>   0</yaw>
		</orient>
		<thruster file="rearprop">
			<sense>1</sense>
			<location unit="M">
				<x> 2.077</x>
				<y>-0.518</y>
				<z> 0.222</z>
			</location>
			<orient unit="DEG">
				<pitch> 90</pitch>
				<roll>   0</roll>
				<yaw>    0</yaw>
			</orient>
		</thruster>
	</engine>

	<engine file="eng"> 		<!-- ESC 3: front left, CW -->
		<location unit="M">
			<x> 0.312</x>
			<y>-0.749</y>
			<z> 0.183</z>
		</location>
		<orient unit="DEG">
			<pitch> 90</pitch>
			<roll>  0</roll>
			<yaw>   0</yaw>
		</orient>
		<thruster file="frontprop">
			<sense>-1</sense>
			<location unit="M">
				<x> 0.312</x>
				<y>-0.749</y>
				<z> 0.183</z>
			</location>
			<orient unit="DEG">
				<pitch> 90</pitch>
				<roll>   0</roll>
				<yaw>    0</yaw>
			</orient>
		</thruster>
	</engine>

	<engine file="eng"> 		<!-- ESC 4: rear right, CW -->
		<location unit="M">
			<x> 2.077</x>
			<y> 0.518</y>
			<z> 0.222</z>
		</location>
		<orient unit="DEG">
			<pitch> 90</pitch>
			<roll>  0</roll>
			<yaw>   0</yaw>
		</orient>
		<thruster file="rearprop">
			<sense>-1</sense>
			<location unit="M">
				<x> 2.077</x>
				<y> 0.518</y>
				<z> 0.222</z>
			</location>
			<orient unit="DEG">
				<pitch> 90</pitch>
				<roll>   0</roll>
				<yaw>    0</yaw>
			</orient>
		</thruster>
	</engine>
</propulsion>


<!-- *************************** CONTROLS ********************************** -->
<!-- TODO -->
<flight_control name="FCS: kentavros">
</flight_control>

<aerodynamics file="kentavros-aero.xml"/>

</fdm_config>
